# Test system for LAMMPS simulation

units               real
atom_style          awsemmd
boundary            p p p
newton              on  #yes

#   ---         Variables for debye huckel potential        ---     #
#   parallel replica temperatures
variable            T   world   300 310 320 330 340 350 360 370 380 390 400 410
variable v1 equal random(1,1000,RANDOMSEED)
variable            random      equal   round(v_v1)+v_T

variable            salt        equal   150.0       # Salt concentration [mM]
variable            ldby        equal   7.853761348027935    # debye screen length, depend on both T and salt, determined from known formula given that dielec=78
variable            ldbi        equal   1.0/v_ldby  # debye screen length
variable            cut_coul    equal   v_ldby*4.0  # coulombic cutoff is four times the debye length.
                                                    # This is consistent with the DNA model
variable            cut_lj      equal   15.0
variable            cut_lj_pair equal   20.0
variable            dielec      equal   78.0

read_data           ../../../../setup/post_processing/data.prot_dna_ions

variable            inputdir    string "../../../../setup/post_processing"
# Specify the different interaction styles
bond_style          hybrid list ${inputdir}/dna_list_files/in00_bond.list list/ca ${inputdir}/prot_list_files/ca_bond_list.txt
angle_style         hybrid stacking/3spn2   list    ${inputdir}/dna_list_files/in00_angl.list list/ca ${inputdir}/prot_list_files/ca_angle_list.txt
dihedral_style      hybrid list ${inputdir}/dna_list_files/in00_dihe.list list/ca ${inputdir}/prot_list_files/ca_dihed_list.txt

pair_style          hybrid/overlay 3spn2 bdna/curv 300.0 ${salt} 18.0 20.0 list ${inputdir}/prot_list_files/ca_pair_list.txt ${cut_lj_pair} nocheck coul/long 20.0 coul/diel 12.0 gauss/cut 12.0 gauss/cut 12.0 lj/cut 12.0

pair_coeff          * * list

dielectric          ${dielec}

# read in pair interaction
include           ${inputdir}/forcefield/proteinDna_pairCoeff.in_ppmj_ions_nopdnalj
## shift the cutoff energy
pair_modify         shift yes

include           ${inputdir}/forcefield/bonded_ff.txt

#   ---         group definitions       --- #
include             ${inputdir}/groupsDefinition/group_rigid_inner_layer_included.txt
group nonRigidBody subtract all nucl1
#group2ndx           groups.ndx

# ---     from AWSEM simulation   ---
neighbor            5      bin
# Delete the nonbonded interactions of the defined rigid body;
neigh_modify exclude group nucl1 nucl1 check no
neigh_modify        check  yes     one 5000    # this avoids the error "boost neigh_modify one"
atom_modify         sort 0 0.0
#special_bonds       fene
special_bonds       lj 0.0 0.0 0.0
## Delete the bonds of the defined rigid body;
#delete_bonds nucl1 multi remove


#####################################################
# Ensuring that neighboring base sites are included when simulating across many processors
comm_modify mode single cutoff 30.0
#
# A timestep of 0.02 ps
timestep            5.0
thermo              5000
thermo_style        multi
thermo_modify flush yes

dump                1 all dcd 5000 DUMP_FILE_temp${T}.dcd
dump_modify         1 sort id

restart             50000 state_temp${T}.1.cpt state_temp${T}.2.cpt

velocity            all create ${T} ${random} rot yes mom yes dist gaussian

# Fix for removing the COM motion
# fix comm_mode all momentum 100000 linear 1 1 1 angular rescale

# Fix from plumed
#fix     pl all plumed plumedfile plumed.dat outfile plumed.out
fix                 3 all colvars input.colvars output out_temp${T}
fix_modify          3 energy yes

#####################################################
#   ---         Parallel Tempering      ---     #
minimize        1.0e-4 1.0e-6 1000 100000
reset_timestep 0

fix myfix   nonRigidBody nvt temp ${T} ${T} 1000.0
fix             rigidBody core rigid/nvt group 1 nucl1 temp ${T} ${T} 1000.0
fix 2 all balance 5000 1.0 shift xyz 10 1.1
temper              100000 100 ${T} myfix 3847 58382 rigidbodyfix rigidBody
write_restart state_temp${T}.cpt
write_dump all atom DUMP_Extract_temp${T}.atom modify image yes scale no sort id
